// COMSOL Multiphysics 5.4.0.295 model "Biofilm_spherical.mph"
// Outline of the model tree

Parameters
  L_F = 300[um]
  D_o2 = 2e-9[m^2/s]
  Y_o2 = 0.06[mol/g]
  umax = 3[1/d]
  K_o2 = 3[umol/l]
  c_x = 20[g/l]
  cb_o2 = 0.125[mmol/l]
  n = 0
  D_s = 1e-9[m^2/s]
  Y_s = 0.03[mol/g]
  K_s = 0.02[mmol/l]
  cb_s = 0.3[mmol/l]

Variables
  var2 "Variables 2"
    r_x = umax*c_o2/(c_o2+K_o2)*c_x*c_s/(c_s+K_s)
    r_o2 = -Y_o2*r_x
    r_s = -Y_s*r_x
    J_o2_int = intop1(r_o2)
    J_o2_diff = -D_o2*c_o2x

Couplings
  intop1: Integration on domains 1

Geometry
  geom1 "Geometry 1" (1D, length unit µm)
    i1: Interval | coord = {0, L_F}
    fin: Finalize "Form Union"

Physics
  tds: DilutedSpecies "Transport of Diluted Species" on all domains
    dependent variable c_o2 = {c_o2, c_s}
    TransportMechanism.MassTransferInPorousMedia = 0
    cdm1: ConvectionDiffusionMigration "Transport Properties 1" (default) | D_c_o2 = D_o2; D_c_s = D_s
    nflx1: NoFlux (default)
    init1: init "Initial Values 1" (default) | initc = {0, 0}
    reac1: Reactions on domains 1 | R_c_o2 = r_o2; R_c_s = r_s
    conc1: Concentration "Conc Right Side" on boundaries 2 | species = {1, 1}; c0 = {0, cb_s}
    conc2: Concentration "Conc Left Side" on boundaries 1 | species = {1, 1}; c0 = {cb_o2, 0}

Mesh
  mesh1 "Mesh 1" (physics-controlled)
    size: MeshSizeDefault | hauto = 1

Studies
  std1 "Study 1"
    param2: Parametric "Parametric Sweep "n"" (disabled) | pname = n; plistarr = 0 1 2; punit = 1
    param: Parametric "Parametric Sweep" (disabled)
      sweeptype = filled
      pname = {D_o2, cb_o2}
      plistarr = {1e-10 1e-9 1e-8, 0.08 0.13 0.2}
      punit = {m^2/s, mol/m^3}
    stat: Stationary
  std2 "Study 2"
    time: Transient "Time Dependent" | tlist = range(0,0.1,20)
  std3 "Study 3"
    time: Transient "Time Dependent" | tlist = range(0,0.1,1)

Solver configurations
  sol1 "Solution 1" (study std1)
    v1: Variables "Dependent Variables 1"
    s1: Stationary "Stationary Solver 1"
      fc1: FullyCoupled | linsolver = d1; initstep = 0.01; minstep = 1.0E-6; maxiter = 50
      d1: Direct | linsolver = pardiso; pivotperturb = 1.0E-13
  sol2 "Solution 2" (study std2)
    v1: Variables "Dependent Variables 1"
    t1: Time "Time-Dependent Solver 1" | tlist = range(0,0.1,20); rtol = 0.005; maxorder = 2
      fc1: FullyCoupled
        linsolver = d1
        maxiter = 8
        damp = 0.9
        jtech = once
        stabacc = aacc
        aaccdim = 5
        aaccmix = 0.9
        aaccdelay = 1
      d1: Direct | linsolver = pardiso; pivotperturb = 1.0E-13
  sol3 "Solution 3" (study std3)
    v1: Variables "Dependent Variables 1"
    t1: Time "Time-Dependent Solver 1" | tlist = range(0,0.1,1); rtol = 0.005; maxorder = 2
      fc1: FullyCoupled
        linsolver = d1
        maxiter = 8
        damp = 0.9
        jtech = once
        stabacc = aacc
        aaccdim = 5
        aaccmix = 0.9
        aaccdelay = 1
      d1: Direct | linsolver = pardiso; pivotperturb = 1.0E-13

Datasets
  dset1: Solution | solution = sol1
  dset2: Solution | solution = sol2
  dset3: Solution | solution = sol3

Plots
  pg1: PlotGroup1D "Concentration (tds)" | data = dset2; title = eval(t_s)s
    lngr1: LineGraph "c_o2" on all domains | data = dset1; expr = c_o2; legends = c_o2
    lngr2: LineGraph "c_s" on all domains | data = dset1; expr = c_s; legends = c_s
    lngr3: LineGraph "Growth Rate" on domains 1 | expr = r_x; legends = growth rate
  pg2: PlotGroup1D "Concentration (tds) 1" | data = dset2
    lngr1: LineGraph on domains 1 | expr = c_o2
  pg3: PlotGroup1D "1D Plot Group 3" | data = dset2
    glob1: Global | expr = {J_o2_int, }
    ptgr1: PointGraph on boundaries 2 | expr = J_o2_diff
  pg4: PlotGroup1D "Concentration (tds) 2" | data = dset3
    lngr1: LineGraph "O2" on domains 1 | expr = c_o2
    lngr2: LineGraph "S" on domains 1 | expr = c_s
    lngr3: LineGraph "growth rate" on all domains | expr = r_x

Exports
  anim1: Animation
    target = player
    giffilename = /Users/kilimetr/Desktop/Athens/COMSOL/aaaaaaa.gif
    maxframes = 201
    options = off
    axes = on